// COMSOL Multiphysics 6.0.0.318 model "untitled.mph"
// Outline of the model tree

Selections
  sel1: Explicit "select domain" on no edges
  sel2: Explicit "select boundary" on no boundaries
  sel3: Explicit on domains 1

Geometry
  geom1 "Geometry 1" (3D, length unit mm)
    wp1: WorkPlane | quickplane = yz
      r1: Rectangle | base = center; size = {1, 1}
      c1: Circle
    ext1: Extrude | workplane = wp1; input = wp1; distance = 1
    fin: Finalize "Form Union"

Materials
  mat1: Common "Iron" on all domains
    def "Basic"
      relpermeability = 4000
      electricconductivity = 1.12e7[S/m]
      thermalexpansioncoefficient = 12.2e-6[1/K]
      heatcapacity = 440[J/(kg*K)]
      relpermittivity = 1
      density = 7870[kg/m^3]
      thermalconductivity = 76.2[W/(m*K)]
    Enu "Young's modulus and Poisson's ratio"
      E = 200e9[Pa]
      nu = 0.29

Physics
  solid: SolidMechanics on all domains
    dependent variable u = {u, v, w}
    lemm1: LinearElasticModel "Linear Elastic Material 1" (default)
    free1: Free (default)
    init1: init "Initial Values 1" (default)
    fix1: Fixed "Fixed Constraint 1" on boundaries 1-4, 8, 9, 11, 12
    fix2: Fixed "Fixed Constraint 2" on boundaries 4
    bndl1: BoundaryLoad on boundaries 4 | LoadType = ForceArea; Ftot = {0, 5, 0}; FperArea = {0, 4, 0}
    bl1: BodyLoad on no domains | FperVol = {0, -2, 0}

Mesh
  mesh1 "Mesh 1" (physics-controlled)

Studies
  std1 "Study 1"
    stat: Stationary

Solver configurations
  sol1 "Solution 1" (study std1)
    v1: Variables "Dependent Variables 1"
    s1: Stationary "Stationary Solver 1"
      fc1: FullyCoupled | linsolver = d1
      d1: Direct "Suggested Direct Solver (solid)" | linsolver = pardiso; pivotperturb = 1.0E-9

Datasets
  dset1: Solution | solution = sol1

Plots
  pg1: PlotGroup3D "Stress (solid)" | data = dset1
    vol1: Volume | expr = solid.mises
      def: Deform "Deformation" | expr = {u, v, w}; descr = Displacement field