// COMSOL Multiphysics 6.0.0.318 model "Untitled2.mph"
// Outline of the model tree

Selections
  sel1: Explicit on boundaries 1, 3, 6
  sel2: Explicit on domains 1

Geometry
  geom1 "Geometry 1" (3D, length unit m)
    blk1: Block | size = {1, 1, 1}
    fin: Finalize "Form Union"

Physics
  solid: SolidMechanics on all domains
    dependent variable u = {u, v, w}
    lemm1: LinearElasticModel "Linear Elastic Material 1" (default)
    free1: Free (default)
    init1: init "Initial Values 1" (default)
    roll1: Roller on boundaries 2
    roll2: Roller on boundaries 6
    sym1: SymmetrySolid "Symmetry 1" on boundaries 6
    bndl1: BoundaryLoad on boundaries 6 | LoadType = ForceArea; Ftot = {0, 1, 0}; FperArea = {0, 2, 0}
    bl1: BodyLoad on domains 1 | FperVol = {0, -10, 0}

Mesh
  mesh1 "Mesh 1" (physics-controlled)

Studies
  std1 "Study 1"
    stat: Stationary